# Лаба 1
U2 := [3.894; 9.49; 17.613; 18.265; 19.942; 20.875; 26.954; 29.125; 30.472]
U1 := [34; 34; 34; 34; 34; 34; 34; 34; 34]
I := [
    273.667*10^-3;
    222.815*10^-3;
    148.973*10^-3;
    143.047*10^-3;
    127.797*10^-3;
    119.317*10^-3;
    64.058*10^-3;
    44.321*10^-3;
    32.069*10^-3
]
Rl := 110
P2 := vectorize(U2*I) = [1.06566; 2.11451; 2.62386; 2.61275; 2.54853; 2.49074; 1.72662; 1.29085; 0.977207]
ΔU := Rl*I = [30.1034; 24.5097; 16.387; 15.7352; 14.0577; 13.1249; 7.04638; 4.87531; 3.52759]
ΔP := vectorize(ΔU*I) = [8.2383; 5.46112; 2.44123; 2.25087; 1.79653; 1.56602; 0.451377; 0.216079; 0.113126]
P1 := P2 + ΔP = [9.30396; 7.57563; 5.06509; 4.86362; 4.34506; 4.05676; 2.178; 1.50693; 1.09033]
η := P2/P1 = [0.114538; 0.279121; 0.518029; 0.537203; 0.586535; 0.613973; 0.792756; 0.85661; 0.896246]
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